# Задано:
R := 287*J/(kg*K)
# Газ - Метан
Pn := 6 MPa
Tvs := -144 °C
# поменять Т 1 = -40 максимум
Ve := 50000/60*L/min = 0.0138889 m^3/s
Pvs := 0.3 MPa
Tvs1 := (-30 + 273.15)*K = 243.15 K
ρvoz := 1.2928  # Т 30 .. 20
z1 := 2
Pkar := Pvs
ΔT := 10 K
Tvs2 := Tvs1 + ΔT = 253.15 K
ρg := 0.656
# Решение:
k := 1.4
PV == zRT == const
# 1. | 1.1 Определение общей степени повышения давления
Ve := Ve = 0.0138889 m^3/s
p_nu := 101133*Pa
ε := Pn/Pvs = 20  # Ve - нормальные условия с запасом
z_nu := 0.99813
# 1.2. Определение степени сжатия на каждой ступени
z_vs := 0.98960
ε11 := nthroot(ε, z1) = 4.47214
T_nu := 293*K
ε1 := 1.1*ε11 = 4.91935
Tvs1_k := Tvs1*ε1^((k - 1)/k) = 383.321 K
ε2 := ε/ε1 = 4.06558
Ve := Ve*p_nu/(T_nu*z_nu)*Tvs1*z_vs/Pvs = 0.00385228 m^3/s  # перевод к Условиям на всасывание
# 1.3. Вычисление промежуточного давления
Pm := Pvs*ε1 = 1475805 Pa
# 1.4. По рекомендациям учебника задаются значения коэффициентов и приблизительной скорости
P1 == ro1*R*T1
A := 2.66*Pa^0.25
δf := 0.005
Cm := 1.5*m/s
# 2. Определение относительных гидравлических потерь на всасывании и нагнетании
P2 == ro2*R*T2
# 2.1. Первой ступени
ro == m/v
δvs1 := δf + 0.3*(Cm/(3.55*m/s))^2*(ρg/ρvoz)*A/Pvs^0.25 = 0.00808902
δn1 := 0.7*(Cm/(3.55*m/s))^2*(ρg/ρvoz)*A/Pm^0.25 = 0.00483973
# 2.2. Второй ступени
δvs2 := 0.3*(Cm/(3.55*m/s))^2*(ρg/ρvoz)*A/Pm^0.25 = 0.00207417
δn2 := 0.7*(Cm/(3.55*m/s))^2*(ρg/ρvoz)*A/Pn^0.25 = 0.00340832
# 3. Определение давления на нагнетании и всасывании
# 3.1. Первой ступени
Pvs1 := Pvs*(1 - δvs1) = 297573 Pa
Pn1 := Pm*(1 + δn1) = 1482947 Pa
# 3.2. Второй ступени
Pvs2 := Pm*(1 - δvs2) = 1472744 Pa
Pn2 := Pn*(1 + δn2) = 6020450 Pa
# 4. Уточнение значения степеней сжатия по ступеням
ε1' := Pn1/Pvs1 = 4.98347
ε2' := Pn2/Pvs2 = 4.08791
# 5. Определение коэффициентов подачи
# 5.1. По рекомендациям учебника задается мертвый объем и коэффициент адиабаты
am := 0.05
k := 1.4
# 5.2. Определение показателя политропы обратного расширения
m1 := 1 + 0.5*(k - 1) = 1.2
m2 := 1 + 0.62*(k - 1) = 1.248
m2 := 1.075
m1 := m2
# 1 ступень | 2 ступень
# 5.3. Определение λ0i (учитывает влияние мертвого объема)
λ01 := 1 - am*(ε1'^(1/m1) - 1) = 0.82724
λ02 := 1 - am*(ε2'^(1/m2) - 1) = 0.864728
_______________________________________________________________________________________
# 5.4. Определение λti (учитывает подогрев газа на всасывании)
λt1 := 1 - 0.01*(ε1' - 1) = 0.960165
λt2 := 1 - 0.01*(ε2' - 1) = 0.969121
________________________________________________________________________________________
# 5.5. Определение λdpi
# (уитывает потери при дросселировании)
λdr1 := 1 - δvs1 = 0.991911
λdr2 := 1 - δvs2 = 0.997926
________________________________________________________________________________________
# 5.7. Опредление коэффициентов подачи для ступеней
λ1 := λ01*λt1*λdr1 = 0.787862
λ2 := λ02*λt2*λdr2 = 0.836288
# 6. Определение описанного объема для ступеней
Vh1 := Ve/λ1 = 0.00488954 m^3/s
Vh2 := Ve*Pvs1*Tvs2/(λ2*Pvs2*Tvs1) = 0.00096902 m^3/s
con := Vh2*0.01 = 9.6902e-6 m^3/s
# 7. Определение хода поршня
c := 1*10^-5*m^3/s
# 7.1. Задание частоты вращения электродвигателя
n := 1450/60*s^-1
Vh1 := Vh1 + c
# 7.2. Определение диаметра поршней
Vh2 := Vh2 + c
D1 := sqrt(8*Vh1/(3.14*Cm)) = 0.0912246 m
Sh1 := Cm/(2*n) = 0.0310345 m
D2 := sqrt(8*Vh2/(3.14*Cm)) = 0.0407784 m
# Принимаем значения D по ГОСТ:
D1gost := 0.10 m
D2gost := 0.045 m
# Вычисляем ход поршня для ступеней и выбираем оптимальные допустимые варианты
.
Sh1 := 0.7*D1gost = 0.07 m
Sh1' := 0.068 m
n := Cm/(2*Sh1') = 11.0294 1/s
n*60 = 661.765 1/s
n := 550/60*1/s
Sh1 := Vh1*4/(π*D1gost^2*n) = 0.0680541 m
Sh2 := Vh2*4/(π*D2gost^2*n) = 0.067153 m
Sh2' := 0.068 m
# 8. Проверка соответствия параметров стандартным диапазонам значений
# Ускорение
# (Стандарт 17..60 м/с^2)
# Относительная длина хода
# (Cандарт 0.45-0.7)
# 1 ступень
Sh1'*n^2 = 5.71389 m/s^2
ψ1 := Sh1'/D1gost = 0.68
ψ2 := Sh2'/D2gost = 1.51111
# 2 ступень
Sh2'*n^2 = 5.71389 m/s^2
# 9. Уточнение скоростей поршней
Cm1 := 2*Sh1'*n = 1.24667 m/s
Cm2 := 2*Sh2'*n = 1.24667 m/s
# 10. Вычисление описанного объема с учетом новых скоростей поршней, определение погрешности относительно старых значений
# 1 ступень | 2 ступень
Vh1' := π*D1gost^2*Cm1/8 = 0.00489565 m^3/s
Vh2' := π*D2gost^2*Cm2/8 = 0.000991369 m^3/s
Vh1 = 0.00489954 m^3/s
Vh2*3600 = 3.52447 m^3/s
Vh2 = 0.00097902 m^3/s
Vh1 := Vh1 - c
Vh2 := Vh2 - c
Vh1' := Vh1' - c
Vh2' := Vh2' - c
δ := (Vh1' - Vh1)/Vh1'*100 = -0.0796547
δ := (Vh2' - Vh2)/Vh2'*100 = 1.2583
# δ < 5% удовлетроряет диапазону погрешности => принимаем данные значения величин как истинные
# 11. Пересчитаем величины давлений и степеней сжатия по ступеням
Pm' := Pm*Vh1'/Vh1*Vh2/Vh2' = 1456075 Pa
Pn1' := Pm'*(1 + δn1) = 1463122 Pa
Pvs2' := Pm'*(1 - δvs2) = 1453055 Pa
Pvs1 = 297573 Pa
ε1'' := Pn1'/Pvs1 = 4.91685
ε2'' := Pn2/Pvs2' = 4.14331
# 12. Определение коэффициентов возврата мощности
Θ1 := 1 - am*(ε1''^(1/k) - 1) = 0.894033
Θ2 := 1 - am*(ε2''^(1/k) - 1) = 0.911983
Pvs1 = 297573 Pa
# 13. Определение индикаторной мощности по ступеням
Vh1' = 0.00488565 m^3/s
Ni1 := Pvs1*Vh1'*Θ1*k/(k - 1)*(ε1''^((k - 1)/k) - 1) = 2621.49 W
Pvs2' = 1453055 Pa
Ni2 := Pvs2'*Vh2'*Θ2*k/(k - 1)*(ε2''^((k - 1)/k) - 1) = 2280.44 W
Vh2' = 0.000981369 m^3/s
# 14. Сравнение индикаторных мощностей ступеней
δ := (Ni1 - Ni2)/Ni1*100 = 13.0096  # <20% => удовлетворяет требованиям задания
# Противодействие на трение 30-50кПа
# Мощность на трение
# (N1+N2)/(N1+N2+Ntr)=кпд мех
# 15. Определение общей индикаторной мощности
Ni := Ni1 + Ni2 = 4901.93 W
Ptr := 50*10^3*Pa
# 16. Определение марки необходимого для обеспечения ресурса электродвигателя
Ntr1 := Ptr*Vh1' = 244.282 W
# Зададим механический  КПД
ηmeh := 0.85
Ntr2 := Ptr*Vh2' = 49.0684 W
Ntr := Ntr1 + Ntr2 = 293.351 W
# Определим необходимую мощность электродвигателя
ηmeh := (Ni1 + Ni2)/(Ni1 + Ni2 + Ntr) = 0.943535
Ne := Ni/ηmeh = 5195.28 W
Nэд := 1.15*Ne = 5974.57 W
Ne*(1 - 0.85) = 779.292 W
# По заданной частоте и полученной мощности подбираем электродвигатель. Ближайший по мощности - А200М4 с номинальной мощностью 37 кВт
# 17.  Определение изотермической и адиабатной мощностей
Nиз := Pvs1*Vh1'*λ1*(ln(ε1'') + ln(ε2'')) = 3452.49 W
Ns := k/(k - 1)*Pvs1*Vh1'*λ1*(ε1''^((k - 1)/k) + ε2''^((k - 1)/k) - 2) = 4318.73 W
# 18. Определение изотермического и адиабатного КПД
ηиз := Nиз/Ne = 0.664544
ηs := Ns/Ne = 0.83128
# 19. Определение поршневых сил давления в мертвых точках
n = 9.16667 1/s
n*60 = 550 1/s
D1gost = 0.1 m
D2gost = 0.045 m
Pn1' = 1463122 Pa
Pn2 = 6020450 Pa
Pvs1 = 297573 Pa
Pvs2' = 1453055 Pa
Cm1 = 1.24667 m/s
Sh1' = 0.068 m
Sh2' = 0.068 m
Vh1' = 0.00488565 m^3/s
Vh2' = 0.000981369 m^3/s
Cm2 = 1.24667 m/s
Ntr1 = 244.282 W
Ntr2 = 49.0684 W
# Для построения графиков
R = 287 m^2/(K*s^2)
ΔVmo1 := Vh1'*(1 - λ01) = 0.000844044 m^3/s
ΔVmo2 := Vh2'*(1 - λ02) = 0.000132751 m^3/s
Vmo1 := Vh1'*am = 0.000244282 m^3/s
Vmo2 := Vh2'*am = 4.90684e-5 m^3/s
λ01 = 0.82724
ΔS1 := R*ln(Pvs/Pvs1) = 2.33099 m^2/(K*s^2)
ΔS2 := R*ln(Pn1'/Pm') = 1.38565 m^2/(K*s^2)
ΔS3 := R*ln(Pm'/Pvs2') = 0.595904 m^2/(K*s^2)
ΔS4 := R*ln(Pn2/Pn) = 0.976524 m^2/(K*s^2)
# Построение графика P-V
# Точка 4
V4 := 60*(Vmo1 + ΔVmo1) = 0.0652996 m^3/s
P1 := Pvs1 = 297573 Pa
# Точка 1
V1 := 60*(Vmo1 + Vh1') = 0.307796 m^3/s
P4 := P1 = 297573 Pa
# Точка 2
V2 := V1*(Pvs1/Pn1')^(1/k) = 0.0986736 m^3/s
P2 := Pn1' = 1463122 Pa
# Точка 3
P3 := Pn1' = 1463122 Pa
V3 := 60*Vmo1 = 0.0146569 m^3/s
# Точка 4`
V4' := 60*(Vmo2 + ΔVmo2) = 0.0109092 m^3/s
P1' := Pvs2' = 1453055 Pa
# Точка 1`
V1' := 60*(Vmo2 + Vh2') = 0.0618262 m^3/s
P4' := P1' = 1453055 Pa
# Точка 2`
V2' := V1'*(Pvs2'/Pn2)^(1/k) = 0.0223981 m^3/s
P2' := Pn2 = 6020450 Pa
# Точка 3`
P3' := Pn2 = 6020450 Pa
V3' := 60*Vmo2 = 0.00294411 m^3/s
# Операции для построения графика
z := 0, 0.1 .. 1.5
P1vs(z) := Pvs
P1vs'(z) := Pvs1
P1n'(z) := Pn1'
P2vs'(z) := Pvs2'
P1m'(z) := Pm'
P2n(z) := Pn
P2n'(z) := Pn2
x := Pvs1, Pvs1 + 1000*Pa .. Pn1'
x1 := Pvs2', Pm' .. Pn2
Pn1' = 1463122 Pa
Ad12(x) := V1*(Pvs1/x)^(1/k)
Ad12'(x1) := V1'*(Pvs2'/x1)^(1/k)
Ad34(x) := V3*(Pn1'/x)^(1/m1)
Ad34'(x1) := V3'*(Pn2/x1)^(1/m1)
P
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P - V
# Постороение графика T - S
Tvs = 129.15 K
Tvs2 = 253.15 K
# Точка 0
T0 := Tvs = 129.15 K
S0 := 3867.15*J/(K*kg)
# Точка 1
T1 := T0
S1 := S0 + ΔS1 = 3869.48 m^2/(K*s^2)
# Точка 2
S2 := S1
T2 := T1*(Pn1'/Pvs1)^((k - 1)/k) = 203.573 K
# Точка 3
T3 := T2 = 203.573 K
S3 := S2 + ΔS2 = 3870.87 m^2/(K*s^2)
# Точка 4
Cp := 1000*J/(K*kg)
S4 := Cp*ln(Tvs2/T3) + S3 = 4088.83 m^2/(K*s^2)
T4 := Tvs2 = 253.15 K
# Точка 1`
T1' := Tvs2 = 253.15 K
S1' := S4 + ΔS3 = 4089.42 m^2/(K*s^2)
# Точка 2`
S2' := S1' = 4089.42 m^2/(K*s^2)
T2' := Tvs2*(Pn2/Pvs2')^((k - 1)/k) = 379.982 K
# Точка 3`
T3' := T2' = 379.982 K
S3' := S2' + ΔS4 = 4090.4 m^2/(K*s^2)
# Точка 4`
S4' := S3' + Cp*ln((Tvs2 + ΔT)/T3') = 3723 m^2/(K*s^2)
T4' := Tvs2 + ΔT = 263.15 K
# Операции для построения графика
Tvs1 = 243.15 K
x := Tvs1, 294.15 K .. 430.15 K
IsoPvs(x) := Cp*ln(x/Tvs1) + S0
IsoPvs1(x) := Cp*ln(x/Tvs1) + S1
x1 := Tvs1, 294.15 K .. 430.15 K
x2 := Tvs1, 294.15 K .. 430.15 K
IsoPn1(x) := Cp*ln(x/T2) + S2
IsoPn2(x) := Cp*ln(x/T2') + S2'
IsoPm(x) := Cp*ln(x/T2) + S3
IsoPn(x) := Cp*ln(x/T2') + S3'
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